A := [1.24, -0.87, -3.17; 2.11, -0.45, 1.44; 0.48, 1.25, -0.63]
b := [0.46; 1.5; 0.35]
lsolve(A, b) = [0.662356; 0.073004; 0.0939455]
dx1 := 0.662356 - 0.662 = 0.000356
dx2 := 0.073004 - 0.073 = 4e-6
dx3 := |0.0939455 - 0.094| = 5.45e-5
ddx1 := dx1/0.662*100*% = 0.000537764
ddx2 := dx2*100*%/0.073 = 5.47945e-5
ddx3 := dx3/0.094*100*% = 0.000579787
