b := [1.28; 0.64; -0.87]
A := [2.23, -0.71, 0.63; -0.71, 5.45, -1.34; 0.63, -1.34, 2.77]
lsolve(A, b) = [0.729039; 0.107162; -0.42805]
# Погрешность абсолютная! | Погрешность относительная!
dx1 := 0.729039 - 0.729 = 3.9e-5
Dx1 := dx1*100/0.729 = 0.00534979
dx2 := 0.107162 - 0.107 = 0.000162
Dx2 := dx2*100/0.107 = 0.151402
dx3 := -0.428 + 0.42805 = 5e-5
Dx3 := dx3*100/0.428 = 0.0116822
