b := [1.71; -0.62; 0.89; -0.94]
A := [-0.83, 0.31, -0.18, 0.22; -0.21, -1, 0.33, 0.22; 0.32, -0.18, -0.95, -0.19; 0.12, 0.28, -0.14, -1]
lsolve(A, b) = [-1.16506; 0.574247; -1.67725; 1.1958]
# Погрешность абсолютная! | Погрешность относительная!
dx1 := -1.165 + 1.16508 = 8e-5
Dx1 := dx1*100/1.165 = 0.00686695
dx2 := 0.57434 - 0.574 = 0.00034
Dx2 := dx2*100/0.574 = 0.0592334
dx3 := 1.6774 - 1.677 = 0.0004
dx4 := 1.196 - 1.1958 = 0.0002
Dx3 := dx3*100/1.677 = 0.0238521
Dx4 := dx4*100/1.196 = 0.0167224
