b := [6.5; -0.24; 4.3]
A := [3.5, -2.5, 0.7; 0.5, 3.3, 1.7; 1.6, 2.3, -7.5]
lsolve(A, b) = [1.76237; -0.205601; -0.260412]
# Погрешность абсолютная! | Погрешность относительная!
dx1 := 1.762 - 1.68095 = 0.08105
Dx1 := dx1*100/1.762 = 4.59989
dx2 := 0.206 - 0.18726 = 0.01874
Dx2 := dx2*100/0.206 = 9.09709
dx3 := 0.272156 - 0.26 = 0.012156
Dx3 := dx3*100/0.26 = 4.67538
